*Heading
** Job name: Job-1 Model name: Model-1
** Generated by: Abaqus/CAE 6.14-1
*Preprint, echo=NO, model=NO, history=NO, contact=NO
**
** PARTS
**
*Part, name=Part-1
*End Part
**
**
** ASSEMBLY
**
*Assembly, name=Assembly
**
*Instance, name=Part-1-1, part=Part-1
** add body force elements
*USER ELEMENT, TYPE=U1, NODES=8, COORDINATES=3, PROPERTIES=8
1,2,3
*Node
      1,  -1.11803401,           0.,           0.
      2,   1.11803401,           0.,           0.
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*Element, type=C3D8H
   1,  158,  159,  213,  211,    5,    6,   60,   58
   2,  159,  160,  214,  213,    6,    7,   61,   60
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*ELEMENT, TYPE=U1
6001,158,159,213,211,5,6,60,58
6002,159,160,214,213,6,7,61,60
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*Nset, nset=Set-3, generate
    1,  6273,     1
*Elset, elset=Set-3, generate
    1,  5360,     1
*Elset, elset=BODYFORCE, generate
6000,11360,1
** Define UEL properties:
**  rho, Omega, axis(1:3), x0(1:3)
*UEL PROPERTY, ELSET=BODYFORCE
10., 5.0,  0., 1., 0.,   0., 0., 0.
** Section: Section-1
*Solid Section, elset=Set-3, material=Material-1
,
*End Instance
**
*Nset, nset=Set-1, instance=Part-1-1, generate
   1,  153,    1
*Elset, elset=Set-1, instance=Part-1-1, generate
   1,  134,    1
*Nset, nset=Set-2, instance=Part-1-1
 2,
*Nset, nset=Set-3, instance=Part-1-1
 1,
*End Assembly
**
** MATERIALS
**
*Material, name=Material-1
*Hyperelastic, neo hooke
1000.,0.
**
** BOUNDARY CONDITIONS
**
** Name: BC-1 Type: Displacement/Rotation
*Boundary
Set-1, 3, 3
Set-1, 1, 1
Set-1, 2, 2
** ----------------------------------------------------------------
**
** STEP: Step-1
**
*Step, name=Step-1, nlgeom=YES
*Static
0.1, 1., 1e-05, 0.1
**
** OUTPUT REQUESTS
**
*Restart, write, frequency=0
**
** FIELD OUTPUT: F-Output-1
**
*Output, field, variable=PRESELECT
**
** HISTORY OUTPUT: H-Output-1
**
*Output, history, variable=PRESELECT
*End Step
