************************************************************************
*Heading
3D cyclic deformation of a curved bar
************************************************************************
**
** This input file is for 3D cyclic deformation of a curved bar. It is
**  intended as a test of a UMAT for inhomogeneous deformation.
**
** Shihong Li, 2015
************************************************************************
**
** Note: Abaqus has no built-in units. It is the
** user's responsibility to use compatible units.
**
**       Units used in this problem, SI:
**                  Length               --- meters - m
**                  Time                 --- seconds - s
**                  Mass                 --- kilograms - kg
**                  Force                --- Newton - N
**                  Stress               --- Pascal - Pa = N/(m)^2
**                  Energy               --- Joule - J = N*m
**                  Angle                --- radians
**
************************************************************************
**			Parameters
************************************************************************
*Parameter
**
** pressure (Pa)
Pr =  1.0E9

************************************************************************
**			Model definition
************************************************************************
**
** Nodes
**
*Node, nset=nall
      1,           0.,           0.,        0.125
      2, 0.0883883461,           0., 0.0883883461
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**
** Elements
**
*Element, type=C3D8H, elset=elall
  1,   90,   91,  107,  106, 1116, 1117, 1133, 1132
  2,   91,   92,  108,  107, 1117, 1118, 1134, 1133
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**
** Sets
**
*Nset, nset=MovedFace
   4,  68,  69,  70,  71,  72
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*Nset, nset=FixedFace
   3,  47,  48,  49,  50,  51
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*******************************************************************
**  Specification Of Material Properties
*******************************************************************
*SOLID SECTION,ELSET=ELALL,MATERIAL=MAT, controls=sec_con
*Section controls, name=sec_con, hourglass=enhanced
*MATERIAL, NAME=MAT
******************
**       CONTENTS OF PROPS VECTOR (*USER MATERIAL, CONSTANTS =7) :
**       -----------------------------------------------------------
**       PROPS(I)
**       --------
**  1   E        ---  young's modulus
**  2   xnu      ---  poisson ratio
**  3   Y        ---  yield limit
**  4   e0       ---  material props
**  5   n        ---  hardening modulus
**  6   edot0    ---  material props
**  7   m        ---  strain rate sensitivity
**
**       STATE VARIABLES (*DEPVAR 2) :
**       ------------------------------
**      STATEV(1)   = Ee          -- EQUIV. SHEAR PLASTIC STRAIN
**     STATEV(2)   = dEe         -- EQUIV. SHEAR PLASTIC STRAIN RATE
**********************************************************************
**************************
*USER MATERIAL,CONSTANTS=7, type=mechanical
 1000.0, 0.3, 10., 0.1, 3., 0.1d0, 10.
**
**
*DEPVAR
2
*DENSITY
8000.0
************************************************************************
**                   Boundary conditions
************************************************************************
**
** Initial BCS
**
*Boundary
FixedFace,1,3
MovedFace,1,1
MovedFace,3,3
**
************************************************************************
**                   Amplitude definition
************************************************************************
*Amplitude, name=Amp-1, definition=periodic
1, 0.62831853, 0., 0.
0., 0.02
************************************************************************
**             		Step definition
************************************************************************
*Step, name=Load, inc=50000,  nlgeom=yes
*Static
1.d-2,30.0,1.d-6,0.1
**
*Boundary, amplitude=Amp-1
MovedFace,2,2,1.
****************
****************  OUTPUTS
****************
****************  Field output
****************
*Output, field, number interval=300
*node output
u,rf
*element output
s,e,sdv
****************
****************  History output
****************
*Output, history
*node output, nset=MovedFace
rf2,u2
*end step
************************************************************************
